// COMSOL Multiphysics 5.5.0.359 model "L1_convergence.mph"
// Outline of the model tree

Parameters
  height = 100 [mm]
  width = 340 [mm]
  rho_water = 1000 [kg/m^3]
  rho_oil = 0.85 [g/cm^3]
  mu_water = 10^-3 [Pa*s]
  nu_oil = 17.5 [mm^2/s]
  mu_oil = rho_oil * nu_oil
  surf_left = -1 [cm]
  surf_right = -9 [cm]
  cut_xpos = -width/2+2[cm]
  meshtest = 1

Functions
  step1: Step | funcname = iniphi; from = 1; to = 0; smooth = 0.01

Variables
  var1 "Variables 1"
    magGradPhi = sqrt((phix + eps)^2 + (phiy+eps)^2)
    rho_global = rho_oil + (rho_water - rho_oil) * phi
    mu_global = mu_oil + (mu_water - mu_oil) * phi

Geometry
  geom1 "Geometry 1" (2D, length unit cm)
    r1: Rectangle | pos = {-width/2, -height}; size = {width, height}
    pol1: Polygon | source = table; table = {{-width/2, surf_left}, {width/2, surf_right}}
    fin: Finalize "Form Union"

Physics
  spf: LaminarFlow on all domains
    dependent variable u = {u, v, w}
    ShapeProperty.order_fluid = 1
    PhysicalModelProperty.ShallowChannelProperty = 1
    PhysicalModelProperty.dz = 1.4[cm]
    fp1: FluidProperties (default) | rho_mat = userdef; rho = rho_global; mu_mat = userdef; mu = mu_global
    init1: init "Initial Values 1" (default) | p_init = -g_const*rho_global*y
    wallbc1: WallBC "Wall 1" (default)
    vf1: VolumeForce on domains 1, 2 | F = {0, -g_const*rho_global, 0}
    prpc1: PressurePointConstraint on points 3
    vf2: VolumeForce on domains 1, 2
  ht: HeatTransferInFluids on all domains
    dependent variable phi
    ShapeProperty.order_temperature = 1
    fluid1: FluidHeatTransferModel "Fluid 1" (default)
      k_mat = userdef
      k = 0.05*(h/3-phi*(1-phi)/magGradPhi)
      rho_mat = userdef
      rho = 1
      Cp_mat = userdef
      Cp = 1
      gamma_mat = userdef
      gamma = 1
      u_src = root.comp1.u
    init1: init "Initial Values 1 (oil)" (default) | Tinit = iniphi(1/G2)
    ins1: ThermalInsulation (default)
    init2: init "Initial Values (water)" on domains 1 | Tinit = 1-iniphi(1/G2)
    temp1: TemperatureBoundary "Temperature 1" on boundaries 2 | T0 = 1
    temp2: TemperatureBoundary "Temperature 2" on boundaries 5 | T0 = 0
  wd: WallDistance on all domains
    dependent variable G2
    deq1: DistanceEquation (default)
    init1: init "Initial Values 1" (default)
    wall1: Wall on boundaries 4
  spf2: LaminarFlow on all domains
    dependent variable u2 = {u2, v2, w2}
    PhysicalModelProperty.ShallowChannelProperty = 1
    PhysicalModelProperty.dz = 1.4[cm]
    PhysicalModelProperty.IncludeGravity = 1
    fp1: FluidProperties (default)
    init1: init "Initial Values 1" (default)
    wallbc1: WallBC "Wall 1" (default)
    grav1: Gravity
    prpc1: PressurePointConstraint on points 3
  ls: LevelSet on all domains
    dependent variable phils
    lsm1: LevelSetModel (default)
    init1: init "Initial Values 1" (default) | FluidInDomain = Fluid2phils
    nf1: NoFlow (default)
    init2: init "Initial Values 2" on domains 2 | FluidInDomain = Fluid1phils
    ii1: InitialInterface on boundaries 4

Multiphysics
  tpf1: TwoPhaseFlowLevelSet on all domains
    rho1_mat = userdef
    rho1 = rho_oil
    mu1_mat = userdef
    mu1 = mu_oil
    rho2_mat = userdef
    rho2 = rho_water
    mu2_mat = userdef
    mu2 = mu_water
    Fluid_physics = spf2
    Mathematics_physics = ls

Mesh
  mesh1 "Mesh 1"
    size: MeshSizeDefault | table = cfd; hmax = 0.67; hmin = 0.03; hcurve = 0.4; hgrad = 1.2; hauto = 6
    size1: Size on boundaries 1-3, 5-7 | hmax = 0.45
    cr1: CornerRefinement on domains 1, 2 | boundary = boundaries 1-3, 5-7
    ftri1: FreeTri "Free Triangular 1" on remaining entities
    bl1: BndLayer "Boundary Layers 1" on domains 1, 2 | sharpcorners = trim
      blp1: BndLayerProp "Boundary Layer Properties 1" on boundaries 1-3, 5-7
        blnlayers = 2
        blhminfact = 5
        blhmin = 0.228

Studies
  std1 "Study 1"
    param: Parametric "Parametric Sweep" (disabled) | pname = meshtest; plistarr = range(1, 1, 5)
    time: Transient "Time Dependent"
      tlist = range(0,0.1,5)
      solve for = {spf2, ls}
      usesol = on
      notsolmethod = sol
      notstudy = std2
  std2 "Study 2"
    stat: Stationary | solve for = {wd}

Solver configurations
  sol1 "Solution 1" (study std2)
    v1: Variables "Dependent Variables 1"
    s1: Stationary "Stationary Solver 1"
      dDef: Direct
      fc1: FullyCoupled | linsolver = dDef
  sol2 "Solution 2" (study std1)
    v1: Variables "Dependent Variables 1"
    t1: Time "Time-Dependent Solver 1"
      tlist = range(0,0.1,5)
      rtol = 0.005
      atolglobalfactor = 0.05
      atolmethod = {comp1_G2, global, comp1_p, scaled, comp1_phi, global, comp1_u, global, comp1_p2, global, comp1_u2, global, comp1_GI, global, comp1_phils, global}
      atolvaluemethod = {comp1_G2, factor, comp1_p, factor, comp1_phi, factor, comp1_u, factor, comp1_p2, factor, comp1_u2, factor, comp1_GI, factor, comp1_phils, factor}
      atolfactor = {comp1_G2, 0.1, comp1_p, 1, comp1_phi, 0.1, comp1_u, 0.1, comp1_p2, 0.1, comp1_u2, 0.1, comp1_GI, 0.1, comp1_phils, 0.1}
      atol = {comp1_G2, 1e-3, comp1_p, 1e-3, comp1_phi, 1e-3, comp1_u, 1e-3, comp1_p2, 1e-3, comp1_u2, 1e-3, comp1_GI, 1e-3, comp1_phils, 1e-3}
      maxorder = 2
      stabcntrl = on
      bwinitstepfrac = 0.01
      estrat = exclude
      rhoinf = 0.5
      predictor = constant
      d1: Direct "Direct, Heat Transfer Variables (ht) (merged)" | linsolver = pardiso; pivotperturb = 1.0E-13
      se1: Segregated
        ssDef: SegregatedStep | segvar = {comp1_p, comp1_u}
        ss1: SegregatedStep | segvar = {comp1_phi}
        spf21: SegregatedStep
        ls1: SegregatedStep "Segregated Step 1a"
  sol3 "Parametric Solutions 1" (study std1)

Datasets
  dset1: Solution | solution = sol1
  dset2: Solution | solution = sol2
  cln1: CutLine2D | data = dset2; genpoints = {{cut_xpos, 0}, {cut_xpos, -height}}
  dset3: Solution | solution = sol3
  cpt1: CutPoint2D | data = dset3; pointx = -14; pointy = -6

Derived values
  pev1: EvalPoint "Point Evaluation 1"
    data = cpt1
    table = tbl1
    expr = {numberofdofs, spf.U, p}
    unit = {1, m/s, Pa}
    descr = {Number of degrees of freedom, Velocity magnitude, Pressure}

Tables
  tbl1: Table
    // Point Evaluation 1
    meshtest | t (s) | Number of degrees of freedom (1), Point: (-14, -6) | Velocity magnitude (m/s), Point: (-14, -6) | Pressure (Pa), Point: (-14, -6)
    1 | 0 | 83884 | 1.88352e-06 | 561.254
    1 | 0.1 | 83884 | 0.00686456 | 557.105
    1 | 0.2 | 83884 | 0.0132299 | 551.088
    1 | 0.3 | 83884 | 0.0192584 | 546.796
    1 | 0.4 | 83884 | 0.024919 | 541.52
    1 | 0.5 | 83884 | 0.030023 | 536.358
    1 | 0.6 | 83884 | 0.0342408 | 533.431
    1 | 0.7 | 83884 | 0.0371033 | 525.767
    1 | 0.8 | 83884 | 0.0381418 | 520.741
    1 | 0.9 | 83884 | 0.0366707 | 515.696
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
Plots
  pg1: PlotGroup2D "2D Plot Group 1" | data = dset1
    surf1: Surface | expr = G2; descr = Reciprocal wall distance
  pg2: PlotGroup2D "Velocity (spf)" | data = dset2
    surf1: Surface | expr = spf.U
  pg3: PlotGroup2D "Pressure (spf)" | data = dset2
    con1: Contour | expr = p; levelrounding = off
  pg4: PlotGroup2D "Temperature (ht)" | data = dset3
    surf1: Surface | expr = phi
  pg5: PlotGroup2D "Isothermal Contours (ht)" | data = dset2
    con1: Contour | expr = phi; levelrounding = off
  pg6: PlotGroup1D "1D Plot Group 6" | data = cln1
    lngr1: LineGraph | data = cln1; expr = phils; descr = Level set variable
  pg7: PlotGroup2D "Velocity (spf) 1" | data = dset3
    surf1: Surface | expr = spf.U
  pg8: PlotGroup2D "Pressure (spf) 1" | data = dset3
    con1: Contour | expr = p; levelrounding = off
  pg9: PlotGroup2D "Temperature (ht) 1" | data = dset3
    surf1: Surface | expr = phi
  pg10: PlotGroup2D "Isothermal Contours (ht) 1" | data = dset3
    con1: Contour | expr = phi; levelrounding = off
  pg11: PlotGroup2D "2D Plot Group 11" | data = dset1
    mesh1: Mesh | data = dset3
  pg12: PlotGroup1D "1D Plot Group 12" | data = cpt1
    lngr1: LineGraph | data = cln1; expr = spf.U; xdata = expr; xdataexpr = numberofdofs
  pg13: PlotGroup2D "2D Plot Group 13" | data = dset2
    surf1: Surface | expr = phils; descr = Level set variable

Exports
  anim1: Animation | target = player
  plot1: Plot | filename = /home/elias/Documents/cfd/lab1/data/multiphase.txt; multiplecurves = ascolumns
  anim2: Animation
    movietype = webm
    avifilename = /home/elias/Documents/cfd/lab1/data/sensitivity.avi
    aviqual = 0.9
    webmcqlevel = 0.9
    framesel = all
    size = current
  img1: Image | size = current; unit = px; width = 1225; height = 409; pngfilename = mesh_quality_normal
  img2: Image | size = current; unit = px; width = 1225; height = 409; pngfilename = mesh_quality_extra_fine
  anim3: Animation | target = player