// COMSOL Multiphysics 5.5.0.359 model "9_Lab2_TurbulentChannel_211104_1_question4b.mph"
// Outline of the model tree

Parameters
  Ch_height = 0.1 [m]  // Channel height
  Ch_length = 4 [m]  // Channel length
  Fluid_mu = 1E-3 [Pa*s]  // Fluid dynamic viscosity
  Fluid_rho = 1E3 [kg/m^3]  // Fluid density
  U0 = 0.2 [m/s]
  Re_delta = Fluid_rho*U0*Ch_height/2/Fluid_mu  // Reynolds number based on half channel height (delta)

Functions
  int1: Interpolation
    funcname = DNS_yplus_vs_uplus
    table = 
      {0.052865, 0.052634}
      {0.21145, 0.21048}
      {0.4757, 0.47335}
      {0.84556, 0.84089}
      {1.3209, 1.3123}
      {1.9017, 1.8856}
      {2.5876, 2.5566}
      {3.3786, 3.3169}
      {4.2745, 4.1522}
      {5.2749, 5.0414}
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  int2: Interpolation
    funcname = DNS_yplus_vs_Pkplus
    table = 
      {0.00E+00, 2.66E-25}
      {5.29E-02, 1.40E-07}
      {2.11E-01, 9.05E-06}
      {4.76E-01, 1.05E-04}
      {8.46E-01, 6.02E-04}
      {1.32E+00, 2.34E-03}
      {1.90E+00, 6.99E-03}
      {2.59E+00, 1.72E-02}
      {3.38E+00, 3.60E-02}
      {4.27E+00, 6.53E-02}
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  int3: Interpolation
    funcname = DNS_yplus_vs_epplus
    table = 
      {0.00E+00, 2.21E-01}
      {5.29E-02, 2.19E-01}
      {2.11E-01, 2.13E-01}
      {4.76E-01, 2.06E-01}
      {8.46E-01, 1.98E-01}
      {1.32E+00, 1.90E-01}
      {1.90E+00, 1.81E-01}
      {2.59E+00, 1.72E-01}
      {3.38E+00, 1.61E-01}
      {4.27E+00, 1.49E-01}
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  int4: Interpolation
    funcname = DNS_yplus_vs_kplus
    table = 
      {0.00E+00, 2.16208E-11}
      {5.29E-02, 0.024778438}
      {2.11E-01, 0.09846088}
      {4.76E-01, 0.219300705}
      {8.46E-01, 0.384824564}
      {1.32E+00, 0.592039543}
      {1.90E+00, 0.837075027}
      {2.59E+00, 1.113912339}
      {3.38E+00, 1.41261757}
      {4.27E+00, 1.718911865}
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
Variables
  var1 "Variables 1: Dimensionless parameters"
    Re_tau = Fluid_rho*u_tau_probe*Ch_height/2/Fluid_mu  // Reynolds number based friction velocity
    uplus = u/u_tau_probe
    yplus = Fluid_rho*spf.Dw*u_tau_probe/Fluid_mu
  var2 "Variables 2: Production of turbulence"
    Pk_manual = spf.muT*(spf.sr)^2

Probes
  bnd1: Boundary "Boundary Probe 1" on boundaries 4
    probename = u_tau_probe
    expr = sqrt(spf.tau_w/Fluid_rho)
    unit = m/s
    frame = spatial
    table = tbl2

Geometry
  geom1 "Geometry 1" (2D, length unit m)
    r1: Rectangle | size = {Ch_length, Ch_height}
    pt1: Point | p = {0.5*Ch_length, }
    pt2: Point | p = {0.9*Ch_length, 0}
    fin: Finalize "Form Union"

Physics
  spf: TurbulentFlowkeps "Turbulent Flow, Low Re k-ε" on all domains
    dependent variable u = {u, v, w}
    TurbulenceModelProperty.TurbulenceModel = lowRekeps
    TurbulenceModelProperty.WallTreatment = LowReynoldsNumber
    TurbulenceModelProperty.editTurbulenceModelParameters = 0
    fp1: FluidProperties (default)
      LengthScaleSpecification = Automatic
      rho_mat = userdef
      rho = Fluid_rho
      mu_mat = userdef
      mu = Fluid_mu
    init1: init "Initial Values 1" (default)
    wallbc1: WallBC "Wall 1" (default)
    inl1: InletBoundary "Inlet 1" on boundaries 1
      U0in = U0*s*(1-s)*4
      RANSVarOption = SpecifyTurbulentLengthScaleAndIntensity
    out1: OutletBoundary "Outlet 1" on boundaries 6

Mesh
  mesh1 "Mesh 1"
    size: MeshSizeDefault | hauto = 8
    size1: Size on boundaries 2-5 | table = cfd; hmax = 0.0067; hmin = 3.0E-4; hcurve = 0.4; hgrad = 1.2; hauto = 6
    cr1: CornerRefinement on domains 1 | boundary = boundaries 2-5
    ftri1: FreeTri "Free Triangular 1" on remaining entities
    bl1: BndLayer "Boundary Layers 1" on domains 1 | sharpcorners = trim
      blp1: BndLayerProp "Boundary Layer Properties 1" on boundaries 2-5 | blnlayers = 20; blstretch = 1.1

Studies
  std2 "Study 1-Stationary"
    wdi: WallDistanceInitialization
    stat: Stationary

Solver configurations
  sol2 "Solution 2" (study std2)
    v1: Variables "Dependent Variables 1"
    s1: Stationary "Stationary Solver 1" | stol = 1.0E-6
      fc1: FullyCoupled | linsolver = d1; initstep = 0.01; minstep = 1.0E-6; maxiter = 50
      d1: Direct "Direct, wall distance (spf)" | linsolver = pardiso; pivotperturb = 1.0E-13
    su1: StoreSolution "Solution Store 1"
    v2: Variables "Dependent Variables 2" | initmethod = sol; notsolmethod = sol
    s2: Stationary "Stationary Solver 2"
      se1: Segregated | maxsegiter = 300; segstabacc = segcflcmp; subinitcfl = 2; subkdpid = 0.03; subcfltol = 0.08
        ss1: SegregatedStep "Velocity u, Pressure p" | segvar = {comp1_u, comp1_p}; linsolver = d1; subdamp = 0.5
        ss2: SegregatedStep "Turbulence variables"
          segvar = {comp1_k, comp1_ep}
          linsolver = d2
          subdamp = 0.35
          subtermconst = itertol
          subiter = 3
          subntolfact = 1
        ll1: LowerLimit | lowerlimit = comp1.k 0 comp1.ep 0
      d1: Direct "Direct, fluid flow variables (spf)" | linsolver = pardiso; pivotperturb = 1.0E-13
      d2: Direct "Direct, turbulence variables (spf)" | linsolver = pardiso; pivotperturb = 1.0E-13
  sol3 "Solution Store 1" (study std2)

Datasets
  cln1: CutLine2D "Cut Line 2D 1: Vertical 1/60"
    data = dset2
    genpoints = {{Ch_length/60, Ch_height}, {Ch_length/60, 0}}
  cln2: CutLine2D "Cut Line 2D 1: Vertical 3/4"
    data = dset2
    genpoints = {{Ch_length*3/4, Ch_height/2}, {Ch_length*3/4, 0}}
  cln3: CutLine2D "Cut Line 2D 1: Horizontal 1/2" | data = dset2; genpoints = {{0, Ch_height/2}, {Ch_length, Ch_height/2}}
  dset2: Solution | solution = sol2
  dset3: Solution | solution = sol3
  edg2: Edge2D "Exterior Walls 1" on boundaries 2-5 | data = dset2
  dset4: Solution "Probe Solution 4" | solution = sol2
  avh1: Average "Boundary Probe 1" on boundaries 4 | data = dset4

Derived values
  gev1: EvalGlobal "Global Evaluation 1" | data = dset2; table = tbl1; expr = {u_tau_probe, Re_tau}
  pev1: EvalPoint "Boundary Probe 1" | data = avh1; table = tbl2; expr = sqrt(spf.tau_w/Fluid_rho)

Tables
  tbl1: Table
    // Global Evaluation 1
    Probe variable u_tau_probe (m/s) | Reynolds number based friction velocity (1)
    0.00774749 | 387.374
  tbl2: Table "Probe Table 2"
    sqrt(spf.tau_w/Fluid_rho) (m/s), Boundary Probe 1
    0.00764371

Plots
  pg4: PlotGroup1D "Velocity profile vertical" | data = dset2
    lngr1: LineGraph | data = cln1; expr = spf.U; autosolution = off; legends = U @1/60
    lngr2: LineGraph | data = cln2; expr = spf.U; autosolution = off; legends = U @3/4
  pg5: PlotGroup1D "Velocity profile horizontal" | data = none
    lngr1: LineGraph | data = cln3; expr = spf.U; autosolution = off; legends = U @1/2
  pg6: PlotGroup2D "Velocity" | data = dset2
    surf1: Surface | expr = spf.U
  pg7: PlotGroup2D "Pressure" | data = dset2
    con1: Contour | expr = p; levelrounding = off
  pg8: PlotGroup2D "Wall Resolution" | data = dset2
    line1: Line "Wall Resolution" | expr = spf.Delta_wPlus; linetype = tube
      hght1: Height "Height Expression" | heightdata = expr; expr = spf.WRHeightExpr
  pg24: PlotGroup1D "Pk+ & U+ & 5k+ & 50ep+ vs y+"
    data = cln2
    title = LowRe k-eps with damping functions vs DNS
    xlabel = y+
    lngr6: LineGraph "50Pk_manual+" (disabled)
      iscachedirty = on
      expr = 50*Pk_manual/(u_tau_probe)^4*Fluid_mu/Fluid_rho/Fluid_rho
      unit = 1
      xdata = expr
      xdataexpr = yplus
      autosolution = off
      legends = 50Pk_manual+
    lngr4: LineGraph "U+" | expr = uplus; legends = U+
    lngr2: LineGraph "U+ DNS"
      iscachedirty = on
      expr = DNS_yplus_vs_uplus(yplus)
      descr = Interpolation 1
      xdata = expr
      xdataexpr = yplus
      autosolution = off
      legends = U+ DNS
    lngr5: LineGraph "50Pk+"
      iscachedirty = on
      expr = 50*spf.Pk/(u_tau_probe)^4*Fluid_mu/Fluid_rho/Fluid_rho
      unit = 1
      xdata = expr
      xdataexpr = yplus
      autosolution = off
      legends = 50Pk+
    lngr8: LineGraph "50Pk+ DNS"
      expr = 50*DNS_yplus_vs_Pkplus(yplus)
      xdata = expr
      xdataexpr = yplus
      legends = 50Pk+ DNS
    lngr1: LineGraph "50ep+"
      iscachedirty = on
      expr = 50*ep/(u_tau_probe)^4*Fluid_mu/Fluid_rho
      unit = 1
      xdata = expr
      xdataexpr = yplus
      autosolution = off
      legends = 50ep+
    lngr9: LineGraph "50ep+ DNS"
      expr = 50*DNS_yplus_vs_epplus(yplus)
      xdata = expr
      xdataexpr = yplus
      legends = 50ep+ DNS
    lngr3: LineGraph "5k+" | expr = 5*k/(u_tau_probe)^2; legends = 5k+
    lngr7: LineGraph "5k+ DNS" | expr = 5*DNS_yplus_vs_kplus(yplus); xdata = expr; xdataexpr = yplus; legends = 5k+ DNS
  pg25: PlotGroup1D "Probe Plot Group 25"
    tblp1: Table "Probe Table Graph 1" | table = tbl2

Exports
  img1: Image "Comparison graph"
    size = manualprint
    unit = mm
    width = 120*1.4
    height = 90*1.4
    pngfilename = comparison4b_log
    addsuffix = off